# OpenSim document version 30000
Model subject1_Scaled:
  length_units: meters
  force_units: N
  gravity: 0 -9.80665 0
  credits:
    Delp S.L., Loan J.P., Hoy M.G., Zajac F.E., Topp E.L., Rosen J.M., Thelen D.G., Anderson F.C., Seth A. Notes: 3D, 23 DOF gait model created by D.G. Thelen, Univ. of Wisconsin-Madison, and Ajay Seth, Frank C. Anderson, and Scott L. Delp, Stanford University. Lower extremity joint defintions based on Delp et al. (1990). Low back joint and anthropometry based on Anderson and Pandy (1999, 2001). Planar knee model of Yamaguchi and Zajac (1989). Seth replaced tibia translation constraints with a CustomJoint for the knee and removed the patella to eliminate all kinematic constraints; insertions of the quadrucepts are handled with moving points in the tibia frame as defined by Delp 1990. License: Creative Commons (CCBY 3.0). You are free to distribute, remix, tweak, and build upon this work, even commercially, as long as you credit us for the original creation. http://creativecommons.org/licenses/by/3.0/ More Information: http://simtk-confluence.stanford.edu:8080/display/OpenSim/Gait+2392+and+2354+Models
  publications:
    Delp, S.L., Loan, J.P., Hoy, M.G., Zajac, F.E., Topp E.L., Rosen, J.M.: An interactive graphics-based model of the lower extremity to study orthopaedic surgical procedures, IEEE Transactions on Biomedical Engineering, vol. 37, pp. 757-767, 1990. Yamaguchi G.T., Zajac F.E.: A planar model of the knee joint to characterize the knee extensor mechanism." J . Biomecl7. vol. 21. pp. 1-10. 1989. Anderson F.C., Pandy M.G.: A dynamic optimization solution for vertical jumping in three dimensions. Computer Methods in Biomechanics and Biomedical Engineering 2:201-231, 1999. Anderson F.C., Pandy M.G.: Dynamic optimization of human walking. Journal of Biomechanical Engineering 123:381-390, 2001.
  BodySet:
    Body ground: mass=0 mass_center=(0 0 0) inertia_xx=0 inertia_yy=0 inertia_zz=0 meshes=treadmill.vtp
    Body pelvis: mass=8.842592 mass_center=(-0.0682778 0 0) inertia_xx=0.0741799 inertia_yy=0.0741799
        inertia_zz=0.04054559 meshes=(sacrum.vtp pelvis.vtp l_pelvis.vtp)
      CustomJoint ground_pelvis: parent_body=ground location_in_parent=(0 0 0) location=(0 0 0)
        Coordinate pelvis_tilt: motion_type=rotational default_value=0 range=(-1.570796 1.570796) clamped=false
        Coordinate pelvis_list: motion_type=rotational default_value=0 range=(-1.570796 1.570796) clamped=false
        Coordinate pelvis_rotation: motion_type=rotational default_value=0 range=(-1.570796 1.570796) clamped=false
        Coordinate pelvis_tx: motion_type=translational default_value=0 range=(-5 5) clamped=false
        Coordinate pelvis_ty: motion_type=translational default_value=0 range=(-1 2) clamped=false
        Coordinate pelvis_tz: motion_type=translational default_value=0 range=(-3 3) clamped=false
        SpatialTransform:
          TransformAxis rotation1: coordinates=pelvis_tilt axis=(0 0 1) LinearFunction(coefficients=1 0)
          TransformAxis rotation2: coordinates=pelvis_list axis=(1 0 0) LinearFunction(coefficients=1 0)
          TransformAxis rotation3: coordinates=pelvis_rotation axis=(0 1 0) LinearFunction(coefficients=1 0)
          TransformAxis translation1: coordinates=pelvis_tx axis=(1 0 0) LinearFunction(coefficients=1 0)
          TransformAxis translation2: coordinates=pelvis_ty axis=(0 1 0) LinearFunction(coefficients=1 0)
          TransformAxis translation3: coordinates=pelvis_tz axis=(0 0 1) LinearFunction(coefficients=1 0)
    Body femur_r: mass=6.983823 mass_center=(0 -0.170467 0) inertia_xx=0.1010896 inertia_yy=0.02649922
        inertia_zz=0.1066008 meshes=femur_r.vtp
      CustomJoint hip_r: parent_body=pelvis location_in_parent=(-0.0682778 -0.0638354 0.08233069) location=(0 0 0)
        Coordinate hip_flexion_r: motion_type=rotational default_value=0 range=(-2.094395 2.094395) clamped=false
        Coordinate hip_adduction_r: motion_type=rotational default_value=0 range=(-2.094395 2.094395) clamped=false
        Coordinate hip_rotation_r: motion_type=rotational default_value=0 range=(-2.094395 2.094395) clamped=false
        SpatialTransform: axes_held_at_zero=(translation1 translation2 translation3)
          TransformAxis rotation1: coordinates=hip_flexion_r axis=(0 0 1) LinearFunction(coefficients=1 0)
          TransformAxis rotation2: coordinates=hip_adduction_r axis=(1 0 0) LinearFunction(coefficients=1 0)
          TransformAxis rotation3: coordinates=hip_rotation_r axis=(0 1 0) LinearFunction(coefficients=1 0)
    Body tibia_r: mass=2.783723 mass_center=(0 -0.180489 0) inertia_xx=0.03536615 inertia_yy=0.003578717
        inertia_zz=0.03585734 meshes=(tibia_r.vtp fibula.vtp)
      CustomJoint knee_r: parent_body=femur_r location_in_parent=(-0.004512212 -0.3969072 0) location=(0 0 0)
        Coordinate knee_angle_r: motion_type=rotational default_value=0 range=(-2.094395 0.1745329) clamped=false
        SpatialTransform: axes_held_at_zero=(rotation2 rotation3 translation1 translation2 translation3)
          TransformAxis rotation1: coordinates=knee_angle_r axis=(0 0 1) LinearFunction(coefficients=1 0)
    Body talus_r: mass=0.07508357 mass_center=(0 0 0) inertia_xx=0.0006271413 inertia_yy=0.0006271413
        inertia_zz=0.0006271413 meshes=talus.vtp
      CustomJoint ankle_r: parent_body=tibia_r location_in_parent=(0 -0.4156948 0) location=(0 0 0)
        Coordinate ankle_angle_r: motion_type=rotational default_value=0 range=(-1.570796 1.570796) clamped=false
        SpatialTransform: axes_held_at_zero=(rotation2 rotation3 translation1 translation2 translation3)
          TransformAxis rotation1: coordinates=ankle_angle_r axis=(-0.1050135 -0.1740224 0.9791263)
              LinearFunction(coefficients=1 0)
    Body calcn_r: mass=0.9385446 mass_center=(0.0913924 0.0274177 0) inertia_xx=0.0008779979 inertia_yy=0.002445851
        inertia_zz=0.002571279 meshes=foot.vtp
      CustomJoint subtalar_r: parent_body=talus_r location_in_parent=(-0.04457209 -0.03833913 0.007238281)
          location=(0 0 0)
        Coordinate subtalar_angle_r: motion_type=rotational default_value=0 range=(-1.570796 1.570796) clamped=false
        SpatialTransform: axes_held_at_zero=(rotation2 rotation3 translation1 translation2 translation3)
          TransformAxis rotation1: coordinates=subtalar_angle_r axis=(0.7871796 0.6047475 -0.1209495)
              LinearFunction(coefficients=1 0)
    Body toes_r: mass=0.162631 mass_center=(0.0316218 0.00548355 -0.0159937) inertia_xx=6.271413e-5
        inertia_yy=0.0001254283 inertia_zz=6.271413e-5 meshes=bofoot.vtp
      PinJoint mtp_r: parent_body=calcn_r location_in_parent=(0.1634097 -0.001827849 0.0009870383) location=(0 0 0)
        Coordinate mtp_angle_r: motion_type=rotational default_value=0 range=(-1.570796 1.570796) clamped=false
    Body femur_l: mass=6.983823 mass_center=(0 -0.170467 0) inertia_xx=0.1010896 inertia_yy=0.02649922
        inertia_zz=0.1066008 meshes=femur_l.vtp
      CustomJoint hip_l: parent_body=pelvis location_in_parent=(-0.0682778 -0.0638354 -0.08233069) location=(0 0 0)
        Coordinate hip_flexion_l: motion_type=rotational default_value=0 range=(-2.094395 2.094395) clamped=false
        Coordinate hip_adduction_l: motion_type=rotational default_value=0 range=(-2.094395 2.094395) clamped=false
        Coordinate hip_rotation_l: motion_type=rotational default_value=0 range=(-2.094395 2.094395) clamped=false
        SpatialTransform: axes_held_at_zero=(translation1 translation2 translation3)
          TransformAxis rotation1: coordinates=hip_flexion_l axis=(0 0 1) LinearFunction(coefficients=1 0)
          TransformAxis rotation2: coordinates=hip_adduction_l axis=(-1 0 0) LinearFunction(coefficients=1 0)
          TransformAxis rotation3: coordinates=hip_rotation_l axis=(0 -1 0) LinearFunction(coefficients=1 0)
    Body tibia_l: mass=2.783723 mass_center=(0 -0.180489 0) inertia_xx=0.03536615 inertia_yy=0.003578717
        inertia_zz=0.03585734 meshes=(tibia_l.vtp l_fibula.vtp)
      CustomJoint knee_l: parent_body=femur_l location_in_parent=(-0.004512212 -0.3969072 0) location=(0 0 0)
        Coordinate knee_angle_l: motion_type=rotational default_value=0 range=(-2.094395 0.1745329) clamped=false
        SpatialTransform: axes_held_at_zero=(rotation2 rotation3 translation1 translation2 translation3)
          TransformAxis rotation1: coordinates=knee_angle_l axis=(0 0 1) LinearFunction(coefficients=1 0)
    Body talus_l: mass=0.07508357 mass_center=(0 0 0) inertia_xx=0.0006271413 inertia_yy=0.0006271413
        inertia_zz=0.0006271413 meshes=l_talus.vtp
      CustomJoint ankle_l: parent_body=tibia_l location_in_parent=(0 -0.4156948 0) location=(0 0 0)
        Coordinate ankle_angle_l: motion_type=rotational default_value=0 range=(-1.047198 1.047198) clamped=false
        SpatialTransform: axes_held_at_zero=(rotation2 rotation3 translation1 translation2 translation3)
          TransformAxis rotation1: coordinates=ankle_angle_l axis=(0.1050135 0.1740224 0.9791263)
              LinearFunction(coefficients=1 0)
    Body calcn_l: mass=0.9385446 mass_center=(0.0913924 0.0274177 0) inertia_xx=0.0008779979 inertia_yy=0.002445851
        inertia_zz=0.002571279 meshes=l_foot.vtp
      CustomJoint subtalar_l: parent_body=talus_l location_in_parent=(-0.04457209 -0.03833913 -0.007238281)
          location=(0 0 0)
        Coordinate subtalar_angle_l: motion_type=rotational default_value=0 range=(-1.570796 1.570796) clamped=false
        SpatialTransform: axes_held_at_zero=(rotation2 rotation3 translation1 translation2 translation3)
          TransformAxis rotation1: coordinates=subtalar_angle_l axis=(-0.7871796 -0.6047475 -0.1209495)
              LinearFunction(coefficients=1 0)
    Body toes_l: mass=0.162631 mass_center=(0.0316218 0.00548355 0.0159937) inertia_xx=6.271413e-5
        inertia_yy=0.0001254283 inertia_zz=6.271413e-5 meshes=l_bofoot.vtp
      PinJoint mtp_l: parent_body=calcn_l location_in_parent=(0.1634097 -0.001827849 -0.0009870383) location=(0 0 0)
        Coordinate mtp_angle_l: motion_type=rotational default_value=0 range=(-1.047198 1.047198) clamped=false
    Body torso: mass=25.70606 mass_center=(-0.0267603 0.306505 0) inertia_xx=0.9811662 inertia_yy=0.4513545
        inertia_zz=0.9811662 meshes=(hat_spine.vtp hat_jaw.vtp hat_skull.vtp hat_ribs.vtp)
      CustomJoint back: parent_body=pelvis location_in_parent=(-0.09724999 0.07870779 0) location=(0 0 0)
        Coordinate lumbar_extension: motion_type=rotational default_value=0 range=(-1.570796 1.570796) clamped=false
        Coordinate lumbar_bending: motion_type=rotational default_value=0 range=(-1.570796 1.570796) clamped=false
        Coordinate lumbar_rotation: motion_type=rotational default_value=0 range=(-1.570796 1.570796) clamped=false
        SpatialTransform: axes_held_at_zero=(translation1 translation2 translation3)
          TransformAxis rotation1: coordinates=lumbar_extension axis=(0 0 1) LinearFunction(coefficients=1 0)
          TransformAxis rotation2: coordinates=lumbar_bending axis=(1 0 0) LinearFunction(coefficients=1 0)
          TransformAxis rotation3: coordinates=lumbar_rotation axis=(0 1 0) LinearFunction(coefficients=1 0)
    Body humerus_r: mass=1.526119 mass_center=(0 -0.169033 0) inertia_xx=0.009470442 inertia_yy=0.003267009
        inertia_zz=0.01063027 meshes=arm_r_humerus.vtp
      CustomJoint shoulder_r: parent_body=torso location_in_parent=(0.002814288 0.3558333 0.1516415) location=(0 0 0)
        Coordinate arm_flex_r: motion_type=rotational default_value=0 range=(-3.14 3.14) clamped=false
        Coordinate arm_add_r: motion_type=rotational default_value=0 range=(-3.14 3.14) clamped=false
        Coordinate arm_rot_r: motion_type=rotational default_value=0 range=(-3.14 3.14) clamped=false
        SpatialTransform: axes_held_at_zero=(translation1 translation2 translation3)
          TransformAxis rotation1: coordinates=arm_flex_r axis=(0 0 1) LinearFunction(coefficients=1 0)
          TransformAxis rotation2: coordinates=arm_add_r axis=(1 0 0) LinearFunction(coefficients=1 0)
          TransformAxis rotation3: coordinates=arm_rot_r axis=(0 1 0) LinearFunction(coefficients=1 0)
    Body ulna_r: mass=0.4561327 mass_center=(0 -0.118275 0) inertia_xx=0.00214172 inertia_yy=0.0004468545
        inertia_zz=0.002323209 meshes=ulna_rv.vtp
      CustomJoint elbow_r: parent_body=humerus_r location_in_parent=(0.01350607 -0.2941588 -0.009859307)
          location=(0 0 0)
        Coordinate elbow_flex_r: motion_type=rotational default_value=0 range=(0 2.618) clamped=false
        SpatialTransform: axes_held_at_zero=(rotation2 rotation3 translation1 translation2 translation3)
          TransformAxis rotation1: coordinates=elbow_flex_r axis=(0.226047 0.022269 0.9738618)
              LinearFunction(coefficients=1 0)
    Body radius_r: mass=0.4561327 mass_center=(0 -0.118275 0) inertia_xx=0.00214172 inertia_yy=0.0004468545
        inertia_zz=0.002323209 meshes=radius_rv.vtp
      CustomJoint radioulnar_r: parent_body=ulna_r location_in_parent=(-0.006601427 -0.0127642 0.02559611)
          location=(0 0 0)
        Coordinate pro_sup_r: motion_type=rotational default_value=1.51 range=(1.51 2.570796) clamped=false locked=true
        SpatialTransform: axes_held_at_zero=(rotation2 rotation3 translation1 translation2 translation3)
          TransformAxis rotation1: coordinates=pro_sup_r axis=(0.05639803 0.9984065 0.001952)
              LinearFunction(coefficients=1 0)
    Body hand_r: mass=0.3435073 mass_center=(0 -0.0668239 0) inertia_xx=0.0006449744 inertia_yy=0.0003955168
        inertia_zz=0.0009689078
        meshes=(pisiform_rvs.vtp lunate_rvs.vtp scaphoid_rvs.vtp triquetrum_rvs.vtp hamate_rvs.vtp capitate_rvs.vtp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)
      CustomJoint radius_hand_r: parent_body=radius_r location_in_parent=(-0.008632786 -0.2314385 0.01335594)
          location=(0 0 0)
        Coordinate wrist_flex_r: motion_type=rotational default_value=0 range=(-1.22173 1.22173) clamped=false
            locked=true
        Coordinate wrist_dev_r: motion_type=rotational default_value=0 range=(-0.4363323 0.6108652) clamped=false
            locked=true
        SpatialTransform: axes_held_at_zero=(rotation3 translation1 translation2 translation3)
          TransformAxis rotation1: coordinates=wrist_flex_r axis=(0 0 1) LinearFunction(coefficients=1 0)
          TransformAxis rotation2: coordinates=wrist_dev_r axis=(1 0 0) LinearFunction(coefficients=1 0)
    Body humerus_l: mass=1.526073 mass_center=(0 -0.169033 0) inertia_xx=0.009470442 inertia_yy=0.003267009
        inertia_zz=0.01063027 meshes=humerus_lv.vtp
      CustomJoint acromial_l: parent_body=torso location_in_parent=(0.002814288 0.3558333 -0.1516415) location=(0 0 0)
        Coordinate arm_flex_l: motion_type=rotational default_value=0 range=(-3.14 3.14) clamped=false
        Coordinate arm_add_l: motion_type=rotational default_value=0 range=(-3.14 3.14) clamped=false
        Coordinate arm_rot_l: motion_type=rotational default_value=0 range=(-3.14 3.14) clamped=false
        SpatialTransform: axes_held_at_zero=(translation1 translation2 translation3)
          TransformAxis rotation1: coordinates=arm_flex_l axis=(0 0 1) LinearFunction(coefficients=1 0)
          TransformAxis rotation2: coordinates=arm_add_l axis=(-1 0 0) LinearFunction(coefficients=1 0)
          TransformAxis rotation3: coordinates=arm_rot_l axis=(0 -1 0) LinearFunction(coefficients=1 0)
    Body ulna_l: mass=0.4561327 mass_center=(0 -0.118275 0) inertia_xx=0.00214172 inertia_yy=0.0004468545
        inertia_zz=0.002323209 meshes=ulna_lv.vtp
      CustomJoint elbow_l: parent_body=humerus_l location_in_parent=(0.01350607 -0.2941588 0.009859307)
          location=(0 0 0)
        Coordinate elbow_flex_l: motion_type=rotational default_value=0 range=(0 2.618) clamped=false
        SpatialTransform: axes_held_at_zero=(rotation2 rotation3 translation1 translation2 translation3)
          TransformAxis rotation1: coordinates=elbow_flex_l axis=(-0.226047 -0.022269 0.9738618)
              LinearFunction(coefficients=1 0)
    Body radius_l: mass=0.4561327 mass_center=(0 -0.118275 0) inertia_xx=0.00214172 inertia_yy=0.0004468545
        inertia_zz=0.002323209 meshes=radius_lv.vtp
      CustomJoint radioulnar_l: parent_body=ulna_l location_in_parent=(-0.006601427 -0.0127642 -0.02559611)
          location=(0 0 0)
        Coordinate pro_sup_l: motion_type=rotational default_value=1.51 range=(1.5 2.570796) clamped=false locked=true
        SpatialTransform: axes_held_at_zero=(rotation2 rotation3 translation1 translation2 translation3)
          TransformAxis rotation1: coordinates=pro_sup_l axis=(-0.05639803 -0.9984065 0.001952)
              LinearFunction(coefficients=1 0)
    Body hand_l: mass=0.3435073 mass_center=(0 -0.0668239 0) inertia_xx=0.0006449744 inertia_yy=0.0003955168
        inertia_zz=0.0009689078
        meshes=(pisiform_lvs.vtp lunate_lvs.vtp scaphoid_lvs.vtp triquetrum_lvs.vtp hamate_lvs.vtp capitate_lvs.vtp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)
      CustomJoint radius_hand_l: parent_body=radius_l location_in_parent=(-0.008632786 -0.2314385 -0.01335594)
          location=(0 0 0)
        Coordinate wrist_flex_l: motion_type=rotational default_value=0 range=(-1.22173 1.22173) clamped=false
            locked=true
        Coordinate wrist_dev_l: motion_type=rotational default_value=0 range=(-0.4363323 0.6108652) clamped=false
            locked=true
        SpatialTransform: axes_held_at_zero=(rotation3 translation1 translation2 translation3)
          TransformAxis rotation1: coordinates=wrist_flex_l axis=(0 0 1) LinearFunction(coefficients=1 0)
          TransformAxis rotation2: coordinates=wrist_dev_l axis=(-1 0 0) LinearFunction(coefficients=1 0)
  ForceSet:
    Thelen2003Muscle [values shared by the 92 below unless stated]: min_control=0 max_control=1 optimal_force=1
        max_contraction_velocity=10 activation_time_constant=0.01 deactivation_time_constant=0.04
        FmaxTendonStrain=0.033 FmaxMuscleStrain=0.6 KshapeActive=0.5 KshapePassive=4 Af=0.3 Flen=1.8
    Thelen2003Muscle glut_med1_r: max_isometric_force=819 optimal_fiber_length=0.05207765
        tendon_slack_length=0.07592629 pennation_angle_at_optimal=0.1396263 [radians]
      PathPoint P1: pelvis (-0.0394022 0.0293585 0.119207)
      PathPoint P2: femur_r (-0.0218598 -0.0117321 0.0556524)
    Thelen2003Muscle glut_med2_r: max_isometric_force=573 optimal_fiber_length=0.08239993 tendon_slack_length=0.0516828
        pennation_angle_at_optimal=0
      PathPoint P1: pelvis (-0.0825707 0.0429754 0.0755273)
      PathPoint P2: femur_r (-0.0258708 -0.00581592 0.0528447)
    Thelen2003Muscle glut_med3_r: max_isometric_force=653 optimal_fiber_length=0.06321903
        tendon_slack_length=0.05186701 pennation_angle_at_optimal=0.3316126
      PathPoint P1: pelvis (-0.11811 0.0101403 0.0638926)
      PathPoint P2: femur_r (-0.0309848 -0.0047129 0.0519422)
    Thelen2003Muscle glut_min1_r: max_isometric_force=270 optimal_fiber_length=0.06657439
        tendon_slack_length=0.01566456 pennation_angle_at_optimal=0.1745329
      PathPoint P1: pelvis (-0.0451 -0.00772592 0.104121)
      PathPoint P2: femur_r (-0.00721976 -0.0104285 0.0561537)
    Thelen2003Muscle glut_min2_r: max_isometric_force=285 optimal_fiber_length=0.05494212
        tendon_slack_length=0.02550884 pennation_angle_at_optimal=0
      PathPoint P1: pelvis (-0.0611313 -0.00627731 0.0977122)
      PathPoint P2: femur_r (-0.00962635 -0.0104285 0.0561537)
    Thelen2003Muscle glut_min3_r: max_isometric_force=323 optimal_fiber_length=0.03735129
        tendon_slack_length=0.05012937 pennation_angle_at_optimal=0.01745329
      PathPoint P1: pelvis (-0.0805427 -0.00608416 0.0844013)
      PathPoint P2: femur_r (-0.0135371 -0.00832278 0.055151)
    Thelen2003Muscle semimem_r: max_isometric_force=1288 optimal_fiber_length=0.08009258 tendon_slack_length=0.3594154
        pennation_angle_at_optimal=0.2617994
      PathPoint P1: pelvis (-0.115116 -0.0941307 0.0705086)
      ConditionalPathPoint P2: tibia_r (-0.0336423 -0.0340193 -0.0182809) range=(-0.558505 0.174533)
          coordinate=knee_angle_r
      PathPoint P3: tibia_r (-0.0261018 -0.0461228 -0.0189189)
    Thelen2003Muscle semiten_r: max_isometric_force=410 optimal_fiber_length=0.2005136 tendon_slack_length=0.2548817
        pennation_angle_at_optimal=0.08726646
      PathPoint P1: pelvis (-0.122021 -0.106115 0.0595443)
      ConditionalPathPoint P2: tibia_r (-0.0406318 -0.0276389 -0.0220125) range=(-0.331613 0.174533)
          coordinate=knee_angle_r
      PathPoint P3: tibia_r (-0.0321148 -0.0510628 -0.0221188)
      PathPoint P4: tibia_r (-0.0109241 -0.0721182 -0.0236849)
      PathPoint P5: tibia_r (0.00261018 -0.0924196 -0.0186579)
    Thelen2003Muscle bifemlh_r: max_isometric_force=896 optimal_fiber_length=0.1090593 tendon_slack_length=0.3261773
        pennation_angle_at_optimal=0
      PathPoint P1: pelvis (-0.121645 -0.0990559 0.0684676)
      PathPoint P2: tibia_r (-0.0290986 -0.0348024 0.0284509)
      PathPoint P3: tibia_r (-0.0226215 -0.054427 0.0331589)
    Thelen2003Muscle bifemsh_r: max_isometric_force=804 optimal_fiber_length=0.1718723 tendon_slack_length=0.08841986
        pennation_angle_at_optimal=0.4014257
      PathPoint P1: femur_r (0.00501373 -0.211679 0.0234642)
      PathPoint P2: tibia_r (-0.0290986 -0.0348024 0.0284509)
      PathPoint P3: tibia_r (-0.0226215 -0.054427 0.0331589)
    Thelen2003Muscle sar_r: max_isometric_force=156 optimal_fiber_length=0.5158005 tendon_slack_length=0.09919239
        pennation_angle_at_optimal=0
      PathPoint P1: pelvis (-0.0147758 -0.00125546 0.122461)
      PathPoint P2: femur_r (-0.00300824 -0.357779 -0.0422156)
      PathPoint P3: tibia_r (-0.0054137 -0.0405061 -0.0385726)
      PathPoint P4: tibia_r (0.00580039 -0.0569405 -0.0370258)
      PathPoint P5: tibia_r (0.0234916 -0.0812055 -0.0243617)
    Thelen2003Muscle add_long_r: max_isometric_force=627 optimal_fiber_length=0.1383124 tendon_slack_length=0.110249
        pennation_angle_at_optimal=0.1047198
      PathPoint P1: pelvis (-0.0305174 -0.0807358 0.0166633)
      PathPoint P2: femur_r (0.00501373 -0.211679 0.0234642)
    Thelen2003Muscle add_brev_r: max_isometric_force=429 optimal_fiber_length=0.133193 tendon_slack_length=0.02002903
        pennation_angle_at_optimal=0
      PathPoint P1: pelvis (-0.0566889 -0.0883652 0.0161703)
      PathPoint P2: femur_r (0.000902471 -0.119928 0.0294807)
    Thelen2003Muscle add_mag1_r: max_isometric_force=381 optimal_fiber_length=0.08753669 tendon_slack_length=0.06037013
        pennation_angle_at_optimal=0.08726646
      PathPoint P1: pelvis (-0.0706921 -0.113378 0.0251429)
      PathPoint P2: femur_r (-0.00451235 -0.121432 0.0339931)
    Thelen2003Muscle add_mag2_r: max_isometric_force=343 optimal_fiber_length=0.1222252 tendon_slack_length=0.1212151
        pennation_angle_at_optimal=0.05235988
      PathPoint P1: pelvis (-0.080253 -0.115116 0.0303687)
      PathPoint P2: femur_r (0.00541482 -0.229127 0.0227623)
    Thelen2003Muscle add_mag3_r: max_isometric_force=488 optimal_fiber_length=0.1319552 tendon_slack_length=0.2508156
        pennation_angle_at_optimal=0.08726646
      PathPoint P1: pelvis (-0.107274 -0.11022 0.0481363)
      PathPoint P2: femur_r (0.00701922 -0.384753 -0.026673)
    Thelen2003Muscle tfl_r: max_isometric_force=233 optimal_fiber_length=0.09442015 tendon_slack_length=0.4224059
        pennation_angle_at_optimal=0.05235988
      PathPoint P1: pelvis (-0.0300345 0.0206668 0.122362)
      PathPoint P2: femur_r (0.0294807 -0.0997731 0.0598639)
      PathPoint P3: femur_r (0.00541482 -0.406011 0.035798)
      PathPoint P4: tibia_r (0.00580039 -0.0470799 0.0287119)
    Thelen2003Muscle pect_r: max_isometric_force=266 optimal_fiber_length=0.09978509 tendon_slack_length=0.03292908
        pennation_angle_at_optimal=0
      PathPoint P1: pelvis (-0.0416234 -0.0741688 0.0444684)
      PathPoint P2: femur_r (-0.0122335 -0.0824256 0.0253694)
    Thelen2003Muscle grac_r: max_isometric_force=162 optimal_fiber_length=0.3517297 tendon_slack_length=0.1259033
        pennation_angle_at_optimal=0.05235988
      PathPoint P1: pelvis (-0.0714744 -0.114633 0.0275487)
      ConditionalPathPoint P2: tibia_r (-0.0256861 -0.0308388 -0.0364845) range=(-0.436332 0.174533)
          coordinate=knee_angle_r
      PathPoint P3: tibia_r (-0.0187836 -0.0498157 -0.034609)
      PathPoint P4: tibia_r (0.00580039 -0.0808188 -0.0220415)
    Thelen2003Muscle glut_max1_r: max_isometric_force=573 optimal_fiber_length=0.1389936 tendon_slack_length=0.1223535
        pennation_angle_at_optimal=0.08726646
      PathPoint P1: pelvis (-0.115406 0.0591033 0.0690197)
      PathPoint P2: pelvis (-0.124677 0.00115889 0.0873593)
      PathPoint P3: femur_r (-0.0458254 -0.0248681 0.0393076)
      PathPoint P4: femur_r (-0.027776 -0.0567554 0.047129)
    Thelen2003Muscle glut_max2_r: max_isometric_force=819 optimal_fiber_length=0.1447585 tendon_slack_length=0.1250634
        pennation_angle_at_optimal=0
      PathPoint P1: pelvis (-0.130278 0.016997 0.0555116)
      PathPoint P2: pelvis (-0.132886 -0.0502185 0.0901201)
      PathPoint P3: femur_r (-0.0427169 -0.0531455 0.0293804)
      PathPoint P4: femur_r (-0.0156428 -0.101879 0.042015)
    Thelen2003Muscle glut_max3_r: max_isometric_force=552 optimal_fiber_length=0.1421178 tendon_slack_length=0.1431047
        pennation_angle_at_optimal=0.08726646
      PathPoint P1: pelvis (-0.150269 -0.0303242 0.00571878)
      PathPoint P2: pelvis (-0.147662 -0.101596 0.0397357)
      PathPoint P3: femur_r (-0.0299821 -0.104386 0.0135371)
      PathPoint P4: femur_r (-0.00601647 -0.14229 0.0412128)
    Thelen2003Muscle iliacus_r: max_isometric_force=1073 optimal_fiber_length=0.09767838 tendon_slack_length=0.09767838
        pennation_angle_at_optimal=0.1221731
      PathPoint P1: pelvis (-0.0650909 0.0352495 0.0842041)
      PathPoint P2: pelvis (-0.0249161 -0.0531157 0.0799643)
      ConditionalPathPoint P3: pelvis (-0.0278133 -0.077742 0.0804573) range=(-1.5708 0.785398)
          coordinate=hip_flexion_r
      PathPoint P4: femur_r (0.00170467 -0.0544491 0.00571565)
      PathPoint P5: femur_r (-0.019353 -0.0622705 0.0129354)
    Thelen2003Muscle psoas_r: max_isometric_force=1113 optimal_fiber_length=0.09749959 tendon_slack_length=0.1559993
        pennation_angle_at_optimal=0.1396263
      PathPoint P1: pelvis (-0.0624834 0.0856611 0.0284953)
      PathPoint P2: pelvis (-0.0229846 -0.0550472 0.0748371)
      ConditionalPathPoint P3: pelvis (-0.0278133 -0.077742 0.0804573) range=(-1.5708 0.785398)
          coordinate=hip_flexion_r
      PathPoint P4: femur_r (0.00160439 -0.0508392 0.00381043)
      PathPoint P5: femur_r (-0.0188516 -0.0598639 0.0104285)
    Thelen2003Muscle quad_fem_r: max_isometric_force=381 optimal_fiber_length=0.0534126 tendon_slack_length=0.02373893
        pennation_angle_at_optimal=0
      PathPoint P1: pelvis (-0.110384 -0.111157 0.0512718)
      PathPoint P2: femur_r (-0.0382046 -0.0359985 0.0367005)
    Thelen2003Muscle gem_r: max_isometric_force=164 optimal_fiber_length=0.02370322 tendon_slack_length=0.03851773
        pennation_angle_at_optimal=0
      PathPoint P1: pelvis (-0.109418 -0.0791907 0.0704001)
      PathPoint P2: femur_r (-0.014239 -0.00330906 0.0444216)
    Thelen2003Muscle peri_r: max_isometric_force=444 optimal_fiber_length=0.02549223 tendon_slack_length=0.1127541
        pennation_angle_at_optimal=0.1745329
      PathPoint P1: pelvis (-0.134817 0.000289722 0.0231709)
      PathPoint P2: pelvis (-0.115213 -0.0266544 0.06478)
      PathPoint P3: femur_r (-0.0148406 -0.00360988 0.04382)
    Thelen2003Muscle rect_fem_r: max_isometric_force=1169 optimal_fiber_length=0.1141544 tendon_slack_length=0.3104199
        pennation_angle_at_optimal=0.08726646
      PathPoint P1: pelvis (-0.0284893 -0.0300345 0.0954444)
      ConditionalPathPoint P2: femur_r (0.0334917 -0.404106 0.00190522) range=(-2.61799 -1.45997)
          coordinate=knee_angle_r
      MovingPathPoint P3: tibia_r (0.0500452 0.0222453 0.00135343) x_coordinate=knee_angle_r y_coordinate=knee_angle_r
          z_coordinate=knee_angle_r
        x_location: MultiplierFunction: scale=0.9667322
          SimmSpline: x=(-2.0944 -1.99997 -1.5708 -1.45752 -1.39626 -1.0472 -0.698132 -0.526391 -0.349066 -0.174533 0 0.00017453 0.00034907 0.0279253 0.0872665 0.174533 2.0944)
              y=(0.0155805 0.0179938 0.0275081 0.0296564 0.0307615 0.0365695 0.0422074 0.0450902 0.048391 0.0534299 0.0617576 0.0617669 0.0617762 0.0633083 0.066994 0.0733035 0.0573481)
        y_location: MultiplierFunction: scale=0.9667322
          SimmSpline: x=(-2.0944 -1.99997 -1.5708 -1.45752 -1.39626 -1.0472 -0.698132 -0.526391 -0.349066 -0.174533 0 0.00017453 0.00034907 0.0279253 0.0872665 0.174533 2.0944)
              y=(0.0234116 0.0237613 0.0251141 0.0252795 0.0253146 0.0249184 0.0242373 0.0238447 0.0234197 0.0227644 0.020984 0.0209814 0.0209788 0.0205225 0.0191754 0.0159554 -0.0673774)
        z_location: MultiplierFunction: scale=0.9667322
          SimmSpline: x=(-2.0944 0.1745) y=(0.0014 0.0014)
    Thelen2003Muscle vas_med_r: max_isometric_force=1294 optimal_fiber_length=0.08944402 tendon_slack_length=0.1266286
        pennation_angle_at_optimal=0.08726646
      PathPoint P1: femur_r (0.0140384 -0.210476 0.0188516)
      PathPoint P2: femur_r (0.0356977 -0.27766 0.000902471)
      ConditionalPathPoint P3: femur_r (0.0371016 -0.405911 -0.0125343) range=(-2.61799 -1.21004)
          coordinate=knee_angle_r
      ConditionalPathPoint P4: femur_r (0.0274752 -0.426668 -0.013136) range=(-2.61799 -1.78006)
          coordinate=knee_angle_r
      MovingPathPoint P5: tibia_r (0.0443931 0.021964 -0.0141143) x_coordinate=knee_angle_r y_coordinate=knee_angle_r
          z_coordinate=knee_angle_r
        x_location: MultiplierFunction: scale=0.9667322
          SimmSpline: x=(-2.0944 -1.99997 -1.5708 -1.45752 -1.39626 -1.0472 -0.698132 -0.526391 -0.349066 -0.174533 0 0.00017453 0.00034907 0.0279253 0.0872665 0.174533 2.0944)
              y=(0.00981097 0.0122243 0.0217371 0.0238851 0.0249902 0.0307959 0.0364187 0.0392871 0.0425654 0.0475764 0.0559586 0.0559681 0.0559776 0.0575419 0.0613368 0.0679503 0.0629332)
        y_location: MultiplierFunction: scale=0.9667322
          SimmSpline: x=(-2.0944 -1.99997 -1.5708 -1.45752 -1.39626 -1.0472 -0.698132 -0.526391 -0.349066 -0.174533 0 0.00017453 0.00034907 0.0279253 0.0872665 0.174533 2.0944)
              y=(0.0224154 0.0227651 0.0241265 0.0242933 0.0243287 0.0239462 0.0233593 0.0230677 0.0228342 0.0226362 0.0217917 0.0217903 0.0217889 0.0215365 0.0206842 0.0183269 -0.0656205)
        z_location: MultiplierFunction: scale=0.9667322
          SimmSpline: x=(-2.0944 2.0944) y=(-0.0146 -0.0146)
    Thelen2003Muscle vas_int_r: max_isometric_force=1365 optimal_fiber_length=0.08757628 tendon_slack_length=0.1369009
        pennation_angle_at_optimal=0.05235988
      PathPoint P1: femur_r (0.0290796 -0.192928 0.0310851)
      PathPoint P2: femur_r (0.033592 -0.208972 0.0285782)
      ConditionalPathPoint P3: femur_r (0.0343942 -0.404106 0.0055151) range=(-2.61799 -1.42) coordinate=knee_angle_r
      MovingPathPoint P4: tibia_r (0.0432939 0.0252042 0.00174012) x_coordinate=knee_angle_r y_coordinate=knee_angle_r
          z_coordinate=knee_angle_r
        x_location: MultiplierFunction: scale=0.9667322
          SimmSpline: x=(-2.0944 -1.99997 -1.5708 -1.45752 -1.39626 -1.0472 -0.698132 -0.526391 -0.349066 -0.174533 0 0.00017453 0.00034907 0.0279253 0.0872665 0.174533 2.0944)
              y=(0.0082733 0.0106866 0.0202042 0.022353 0.0234583 0.0292715 0.0349465 0.037871 0.0412569 0.0465287 0.0554632 0.0554735 0.0554837 0.0571717 0.061272 0.0684368 0.0648818)
        y_location: MultiplierFunction: scale=0.9667322
          SimmSpline: x=(-2.0944 -1.99997 -1.5708 -1.45752 -1.39626 -1.0472 -0.698132 -0.526391 -0.349066 -0.174533 0 0.00017453 0.00034907 0.0279253 0.0872665 0.174533 2.0944)
              y=(0.025599 0.0259487 0.0273124 0.0274796 0.0275151 0.0271363 0.0265737 0.0263073 0.0261187 0.0260129 0.0252923 0.0252911 0.0252898 0.0250526 0.0242191 0.0218288 -0.0685706)
        z_location: MultiplierFunction: scale=0.9667322
          SimmSpline: x=(-2.0944 2.0944) y=(0.0018 0.0018)
    Thelen2003Muscle vas_lat_r: max_isometric_force=1871 optimal_fiber_length=0.08436077 tendon_slack_length=0.1576743
        pennation_angle_at_optimal=0.08726646
      PathPoint P1: femur_r (0.00481318 -0.185909 0.0349958)
      PathPoint P2: femur_r (0.0269738 -0.259811 0.0410123)
      ConditionalPathPoint P3: femur_r (0.0361991 -0.404106 0.0205563) range=(-2.61799 -1.21004)
          coordinate=knee_angle_r
      ConditionalPathPoint P4: femur_r (0.0253694 -0.425465 0.0184505) range=(-2.61799 -1.92004)
          coordinate=knee_angle_r
      MovingPathPoint P5: tibia_r (0.0485851 0.0205933 0.0159511) x_coordinate=knee_angle_r y_coordinate=knee_angle_r
          z_coordinate=knee_angle_r
        x_location: MultiplierFunction: scale=0.9667322
          SimmSpline: x=(-2.0944 -1.99997 -1.5708 -1.45752 -1.39626 -1.0472 -0.698132 -0.526391 -0.349066 -0.174533 0 0.00017453 0.00034907 0.0279253 0.0872665 0.174533 2.0944)
              y=(0.0142897 0.016703 0.0262145 0.0283623 0.0294674 0.0352709 0.0408785 0.0437291 0.0469704 0.0518742 0.0599557 0.0599647 0.0599738 0.0614577 0.0650351 0.0711867 0.0583766)
        y_location: MultiplierFunction: scale=0.9667322
          SimmSpline: x=(-2.0944 -1.99997 -1.5708 -1.45752 -1.39626 -1.0472 -0.698132 -0.526391 -0.349066 -0.174533 0 0.00017453 0.00034907 0.0279253 0.0872665 0.174533 2.0944)
              y=(0.0215318 0.0218815 0.0232362 0.0234019 0.0234371 0.0230439 0.0223842 0.0220151 0.0216359 0.0210971 0.0195864 0.0195842 0.019582 0.01919 0.018008 0.0151073 -0.0653421)
        z_location: MultiplierFunction: scale=0.9667322
          SimmSpline: x=(-2.0944 2.0944) y=(0.0165 0.0165)
    Thelen2003Muscle med_gas_r: max_isometric_force=1558 optimal_fiber_length=0.05795072 tendon_slack_length=0.3766797
        pennation_angle_at_optimal=0.296706
      PathPoint P1: femur_r (-0.0190522 -0.393979 -0.0235645)
      ConditionalPathPoint P2: femur_r (-0.0300824 -0.403304 -0.0258708) range=(-0.785398 0.174533)
          coordinate=knee_angle_r
      PathPoint P3: calcn_r (0 0.0283317 -0.0048438)
    Thelen2003Muscle lat_gas_r: max_isometric_force=683 optimal_fiber_length=0.06179782 tendon_slack_length=0.3669246
        pennation_angle_at_optimal=0.1396263
      PathPoint P1: femur_r (-0.0220604 -0.395683 0.0272747)
      ConditionalPathPoint P2: femur_r (-0.0300824 -0.402903 0.0274752) range=(-0.785398 0.174533)
          coordinate=knee_angle_r
      PathPoint P3: calcn_r (0 0.0283317 -0.0048438)
    Thelen2003Muscle soleus_r: max_isometric_force=3549 optimal_fiber_length=0.04817055 tendon_slack_length=0.2408528
        pennation_angle_at_optimal=0.4363323
      PathPoint P1: tibia_r (-0.00232016 -0.1482 0.0068638)
      PathPoint P2: calcn_r (0 0.0283317 -0.0048438)
    Thelen2003Muscle tib_post_r: max_isometric_force=1588 optimal_fiber_length=0.02975706 tendon_slack_length=0.2975706
        pennation_angle_at_optimal=0.2094395
      PathPoint P1: tibia_r (-0.00908728 -0.130315 0.00183679)
      PathPoint P2: tibia_r (-0.0139209 -0.391623 -0.0221382)
      PathPoint P3: calcn_r (0.0381106 0.0305251 -0.0261382)
      PathPoint P4: calcn_r (0.070555 0.0145314 -0.0256813)
    Thelen2003Muscle flex_dig_r: max_isometric_force=310 optimal_fiber_length=0.03202528 tendon_slack_length=0.376768
        pennation_angle_at_optimal=0.1221731
      PathPoint P1: tibia_r (-0.00802388 -0.197793 -0.00174012)
      PathPoint P2: tibia_r (-0.0148877 -0.391623 -0.018948)
      PathPoint P3: calcn_r (0.0398471 0.0287886 -0.0255899)
      PathPoint P4: calcn_r (0.0647058 0.0160851 -0.0240362)
      PathPoint P5: calcn_r (0.151529 -0.00740279 0.0106015)
      PathPoint P6: toes_r (-0.00173646 -0.00712861 0.0134347)
      PathPoint P7: toes_r (0.0260468 -0.00648886 0.0196494)
      PathPoint P8: toes_r (0.0403041 -0.00548355 0.022117)
    Thelen2003Muscle flex_hal_r: max_isometric_force=322 optimal_fiber_length=0.040412 tendon_slack_length=0.3571293
        pennation_angle_at_optimal=0.1745329
      PathPoint P1: tibia_r (-0.00763718 -0.225635 0.0235883)
      PathPoint P2: tibia_r (-0.0179812 -0.39433 -0.0168211)
      PathPoint P3: calcn_r (0.0341808 0.0252243 -0.0220256)
      PathPoint P4: calcn_r (0.0948654 0.00621469 -0.0233965)
      PathPoint P5: calcn_r (0.157743 -0.0048438 -0.0245846)
      PathPoint P6: toes_r (0.0141658 -0.00584912 -0.024219)
      PathPoint P7: toes_r (0.0513626 -0.00932203 -0.016542)
    Thelen2003Muscle tib_ant_r: max_isometric_force=905 optimal_fiber_length=0.09378992 tendon_slack_length=0.2134199
        pennation_angle_at_optimal=0.08726646
      PathPoint P1: tibia_r (0.0173045 -0.156997 0.0111174)
      PathPoint P2: tibia_r (0.0318055 -0.381956 -0.0171112)
      PathPoint P3: calcn_r (0.106564 0.0162679 -0.0278747)
    Thelen2003Muscle per_brev_r: max_isometric_force=435 optimal_fiber_length=0.04787955 tendon_slack_length=0.1541721
        pennation_angle_at_optimal=0.08726646
      PathPoint P1: tibia_r (-0.00676713 -0.255797 0.0314188)
      PathPoint P2: tibia_r (-0.0191413 -0.404481 0.0273585)
      PathPoint P3: tibia_r (-0.0139209 -0.415211 0.0279386)
      PathPoint P4: calcn_r (0.0430458 0.024676 0.0212944)
      PathPoint P5: calcn_r (0.0618727 0.0200149 0.0313476)
    Thelen2003Muscle per_long_r: max_isometric_force=943 optimal_fiber_length=0.04663977 tendon_slack_length=0.328382
        pennation_angle_at_optimal=0.1745329
      PathPoint P1: tibia_r (0.000483366 -0.151584 0.0349957)
      PathPoint P2: tibia_r (-0.0200114 -0.406511 0.0276485)
      PathPoint P3: tibia_r (-0.0156611 -0.417532 0.0279386)
      PathPoint P4: calcn_r (0.0400299 0.0210203 0.0201977)
      PathPoint P5: calcn_r (0.0622383 0.0096876 0.0259555)
      PathPoint P6: calcn_r (0.0778664 0.00630608 0.0107843)
      PathPoint P7: calcn_r (0.109945 0.00776836 -0.0168162)
    Thelen2003Muscle per_tert_r: max_isometric_force=180 optimal_fiber_length=0.07537183 tendon_slack_length=0.09540737
        pennation_angle_at_optimal=0.2268928
      PathPoint P1: tibia_r (0.000966732 -0.271072 0.0223315)
      PathPoint P2: tibia_r (0.0221382 -0.393363 0.015371)
      PathPoint P3: calcn_r (0.0783233 0.0208375 0.0273263)
    Thelen2003Muscle ext_dig_r: max_isometric_force=512 optimal_fiber_length=0.09664302 tendon_slack_length=0.3268808
        pennation_angle_at_optimal=0.1396263
      PathPoint P1: tibia_r (0.00309354 -0.133506 0.0266818)
      PathPoint P2: tibia_r (0.0279386 -0.38737 0.00696047)
      PathPoint P3: calcn_r (0.0842638 0.0354603 -9.13924e-5)
      PathPoint P4: calcn_r (0.14769 0.00502658 0.011881)
      PathPoint P5: toes_r (0.000274177 0.00429544 0.013983)
      PathPoint P6: toes_r (0.0404868 -0.00036557 0.0228481)
    Thelen2003Muscle ext_hal_r: max_isometric_force=162 optimal_fiber_length=0.1049025 tendon_slack_length=0.2882456
        pennation_angle_at_optimal=0.1047198
      PathPoint P1: tibia_r (0.00116008 -0.170822 0.0220415)
      PathPoint P2: tibia_r (0.0315155 -0.385243 -0.00821722)
      PathPoint P3: calcn_r (0.0886507 0.0355517 -0.0192838)
      PathPoint P4: calcn_r (0.11817 0.0282403 -0.0234879)
      PathPoint P5: calcn_r (0.158474 0.0127035 -0.0255899)
      PathPoint P6: toes_r (0.0272349 0.00374709 -0.0223911)
      PathPoint P7: toes_r (0.0514539 0.00310734 -0.016999)
    Thelen2003Muscle glut_med1_l: max_isometric_force=819 optimal_fiber_length=0.05207765
        tendon_slack_length=0.07592629 pennation_angle_at_optimal=0.1396263
      PathPoint P1: pelvis (-0.0394022 0.0293585 -0.119207)
      PathPoint P2: femur_l (-0.0218598 -0.0117321 -0.0556524)
    Thelen2003Muscle glut_med2_l: max_isometric_force=573 optimal_fiber_length=0.08239993 tendon_slack_length=0.0516828
        pennation_angle_at_optimal=0
      PathPoint P1: pelvis (-0.0825707 0.0429754 -0.0755273)
      PathPoint P2: femur_l (-0.0258708 -0.00581592 -0.0528447)
    Thelen2003Muscle glut_med3_l: max_isometric_force=653 optimal_fiber_length=0.06321903
        tendon_slack_length=0.05186701 pennation_angle_at_optimal=0.3316126
      PathPoint P1: pelvis (-0.11811 0.0101403 -0.0638926)
      PathPoint P2: femur_l (-0.0309848 -0.0047129 -0.0519422)
    Thelen2003Muscle glut_min1_l: max_isometric_force=270 optimal_fiber_length=0.06657439
        tendon_slack_length=0.01566456 pennation_angle_at_optimal=0.1745329
      PathPoint P1: pelvis (-0.0451 -0.00772592 -0.104121)
      PathPoint P2: femur_l (-0.00721976 -0.0104285 -0.0561537)
    Thelen2003Muscle glut_min2_l: max_isometric_force=285 optimal_fiber_length=0.05494212
        tendon_slack_length=0.02550884 pennation_angle_at_optimal=0
      PathPoint P1: pelvis (-0.0611313 -0.00627731 -0.0977122)
      PathPoint P2: femur_l (-0.00962635 -0.0104285 -0.0561537)
    Thelen2003Muscle glut_min3_l: max_isometric_force=323 optimal_fiber_length=0.03735129
        tendon_slack_length=0.05012937 pennation_angle_at_optimal=0.01745329
      PathPoint P1: pelvis (-0.0805427 -0.00608416 -0.0844013)
      PathPoint P2: femur_l (-0.0135371 -0.00832278 -0.055151)
    Thelen2003Muscle semimem_l: max_isometric_force=1288 optimal_fiber_length=0.08009258 tendon_slack_length=0.3594154
        pennation_angle_at_optimal=0.2617994
      PathPoint P1: pelvis (-0.115116 -0.0941307 -0.0705086)
      ConditionalPathPoint P2: tibia_l (-0.0336423 -0.0340193 0.0182809) range=(-0.558505 0.174533)
          coordinate=knee_angle_l
      PathPoint P3: tibia_l (-0.0261018 -0.0461228 0.0189189)
    Thelen2003Muscle semiten_l: max_isometric_force=410 optimal_fiber_length=0.2005136 tendon_slack_length=0.2548817
        pennation_angle_at_optimal=0.08726646
      PathPoint P1: pelvis (-0.122021 -0.106115 -0.0595443)
      ConditionalPathPoint P2: tibia_l (-0.0406318 -0.0276389 0.0220125) range=(-0.331613 0.174533)
          coordinate=knee_angle_l
      PathPoint P3: tibia_l (-0.0321148 -0.0510628 0.0221188)
      PathPoint P4: tibia_l (-0.0109241 -0.0721182 0.0236849)
      PathPoint P5: tibia_l (0.00261018 -0.0924196 0.0186579)
    Thelen2003Muscle bifemlh_l: max_isometric_force=896 optimal_fiber_length=0.1090593 tendon_slack_length=0.3261773
        pennation_angle_at_optimal=0
      PathPoint P1: pelvis (-0.121645 -0.0990559 -0.0684676)
      PathPoint P2: tibia_l (-0.0290986 -0.0348024 -0.0284509)
      PathPoint P3: tibia_l (-0.0226215 -0.054427 -0.0331589)
    Thelen2003Muscle bifemsh_l: max_isometric_force=804 optimal_fiber_length=0.1718723 tendon_slack_length=0.08841986
        pennation_angle_at_optimal=0.4014257
      PathPoint P1: femur_l (0.00501373 -0.211679 -0.0234642)
      PathPoint P2: tibia_l (-0.0290986 -0.0348024 -0.0284509)
      PathPoint P3: tibia_l (-0.0226215 -0.054427 -0.0331589)
    Thelen2003Muscle sar_l: max_isometric_force=156 optimal_fiber_length=0.5158005 tendon_slack_length=0.09919239
        pennation_angle_at_optimal=0
      PathPoint P1: pelvis (-0.0147758 -0.00125546 -0.122461)
      PathPoint P2: femur_l (-0.00300824 -0.357779 0.0422156)
      PathPoint P3: tibia_l (-0.0054137 -0.0405061 0.0385726)
      PathPoint P4: tibia_l (0.00580039 -0.0569405 0.0370258)
      PathPoint P5: tibia_l (0.0234916 -0.0812055 0.0243617)
    Thelen2003Muscle add_long_l: max_isometric_force=627 optimal_fiber_length=0.1383124 tendon_slack_length=0.110249
        pennation_angle_at_optimal=0.1047198
      PathPoint P1: pelvis (-0.0305174 -0.0807358 -0.0166633)
      PathPoint P2: femur_l (0.00501373 -0.211679 -0.0234642)
    Thelen2003Muscle add_brev_l: max_isometric_force=429 optimal_fiber_length=0.133193 tendon_slack_length=0.02002903
        pennation_angle_at_optimal=0
      PathPoint P1: pelvis (-0.0566889 -0.0883652 -0.0161703)
      PathPoint P2: femur_l (0.000902471 -0.119928 -0.0294807)
    Thelen2003Muscle add_mag1_l: max_isometric_force=381 optimal_fiber_length=0.08753669 tendon_slack_length=0.06037013
        pennation_angle_at_optimal=0.08726646
      PathPoint P1: pelvis (-0.0706921 -0.113378 -0.0251429)
      PathPoint P2: femur_l (-0.00451235 -0.121432 -0.0339931)
    Thelen2003Muscle add_mag2_l: max_isometric_force=343 optimal_fiber_length=0.1222252 tendon_slack_length=0.1212151
        pennation_angle_at_optimal=0.05235988
      PathPoint P1: pelvis (-0.080253 -0.115116 -0.0303687)
      PathPoint P2: femur_l (0.00541482 -0.229127 -0.0227623)
    Thelen2003Muscle add_mag3_l: max_isometric_force=488 optimal_fiber_length=0.1319552 tendon_slack_length=0.2508156
        pennation_angle_at_optimal=0.08726646
      PathPoint P1: pelvis (-0.107274 -0.11022 -0.0481363)
      PathPoint P2: femur_l (0.00701922 -0.384753 0.026673)
    Thelen2003Muscle tfl_l: max_isometric_force=233 optimal_fiber_length=0.09442015 tendon_slack_length=0.4224059
        pennation_angle_at_optimal=0.05235988
      PathPoint P1: pelvis (-0.0300345 0.0206668 -0.122362)
      PathPoint P2: femur_l (0.0294807 -0.0997731 -0.0598639)
      PathPoint P3: femur_l (0.00541482 -0.406011 -0.035798)
      PathPoint P4: tibia_l (0.00580039 -0.0470799 -0.0287119)
    Thelen2003Muscle pect_l: max_isometric_force=266 optimal_fiber_length=0.09978509 tendon_slack_length=0.03292908
        pennation_angle_at_optimal=0
      PathPoint P1: pelvis (-0.0416234 -0.0741688 -0.0444684)
      PathPoint P2: femur_l (-0.0122335 -0.0824256 -0.0253694)
    Thelen2003Muscle grac_l: max_isometric_force=162 optimal_fiber_length=0.3517297 tendon_slack_length=0.1259033
        pennation_angle_at_optimal=0.05235988
      PathPoint P1: pelvis (-0.0714744 -0.114633 -0.0275487)
      ConditionalPathPoint P2: tibia_l (-0.0256861 -0.0308388 0.0364845) range=(-0.436332 0.174533)
          coordinate=knee_angle_l
      PathPoint P3: tibia_l (-0.0187836 -0.0498157 0.034609)
      PathPoint P4: tibia_l (0.00580039 -0.0808188 0.0220415)
    Thelen2003Muscle glut_max1_l: max_isometric_force=573 optimal_fiber_length=0.1389936 tendon_slack_length=0.1223535
        pennation_angle_at_optimal=0.08726646
      PathPoint P1: pelvis (-0.115406 0.0591033 -0.0690197)
      PathPoint P2: pelvis (-0.124677 0.00115889 -0.0873593)
      PathPoint P3: femur_l (-0.0458254 -0.0248681 -0.0393076)
      PathPoint P4: femur_l (-0.027776 -0.0567554 -0.047129)
    Thelen2003Muscle glut_max2_l: max_isometric_force=819 optimal_fiber_length=0.1447585 tendon_slack_length=0.1250634
        pennation_angle_at_optimal=0
      PathPoint P1: pelvis (-0.130278 0.016997 -0.0555116)
      PathPoint P2: pelvis (-0.132886 -0.0502185 -0.0901201)
      PathPoint P3: femur_l (-0.0427169 -0.0531455 -0.0293804)
      PathPoint P4: femur_l (-0.0156428 -0.101879 -0.042015)
    Thelen2003Muscle glut_max3_l: max_isometric_force=552 optimal_fiber_length=0.1421178 tendon_slack_length=0.1431047
        pennation_angle_at_optimal=0.08726646
      PathPoint P1: pelvis (-0.150269 -0.0303242 -0.00571878)
      PathPoint P2: pelvis (-0.147662 -0.101596 -0.0397357)
      PathPoint P3: femur_l (-0.0299821 -0.104386 -0.0135371)
      PathPoint P4: femur_l (-0.00601647 -0.14229 -0.0412128)
    Thelen2003Muscle iliacus_l: max_isometric_force=1073 optimal_fiber_length=0.09767838 tendon_slack_length=0.09767838
        pennation_angle_at_optimal=0.1221731
      PathPoint P1: pelvis (-0.0650909 0.0352495 -0.0842041)
      PathPoint P2: pelvis (-0.0249161 -0.0531157 -0.0799643)
      ConditionalPathPoint P3: pelvis (-0.0278133 -0.077742 -0.0804573) range=(-1.5708 0.785398)
          coordinate=hip_flexion_l
      PathPoint P4: femur_l (0.00170467 -0.0544491 -0.00571565)
      PathPoint P5: femur_l (-0.019353 -0.0622705 -0.0129354)
    Thelen2003Muscle psoas_l: max_isometric_force=1113 optimal_fiber_length=0.09749959 tendon_slack_length=0.1559993
        pennation_angle_at_optimal=0.1396263
      PathPoint P1: pelvis (-0.0624834 0.0856611 -0.0284953)
      PathPoint P2: pelvis (-0.0229846 -0.0550472 -0.0748371)
      ConditionalPathPoint P3: pelvis (-0.0278133 -0.077742 -0.0804573) range=(-1.5708 0.785398)
          coordinate=hip_flexion_l
      PathPoint P4: femur_l (0.00160439 -0.0508392 -0.00381043)
      PathPoint P5: femur_l (-0.0188516 -0.0598639 -0.0104285)
    Thelen2003Muscle quad_fem_l: max_isometric_force=381 optimal_fiber_length=0.0534126 tendon_slack_length=0.02373893
        pennation_angle_at_optimal=0
      PathPoint P1: pelvis (-0.110384 -0.111157 -0.0512718)
      PathPoint P2: femur_l (-0.0382046 -0.0359985 -0.0367005)
    Thelen2003Muscle gem_l: max_isometric_force=164 optimal_fiber_length=0.02370322 tendon_slack_length=0.03851773
        pennation_angle_at_optimal=0
      PathPoint P1: pelvis (-0.109418 -0.0791907 -0.0704001)
      PathPoint P2: femur_l (-0.014239 -0.00330906 -0.0444216)
    Thelen2003Muscle peri_l: max_isometric_force=444 optimal_fiber_length=0.02549223 tendon_slack_length=0.1127541
        pennation_angle_at_optimal=0.1745329
      PathPoint P1: pelvis (-0.134817 0.000289722 -0.0231709)
      PathPoint P2: pelvis (-0.115213 -0.0266544 -0.06478)
      PathPoint P3: femur_l (-0.0148406 -0.00360988 -0.04382)
    Thelen2003Muscle rect_fem_l: max_isometric_force=1169 optimal_fiber_length=0.1141544 tendon_slack_length=0.3104199
        pennation_angle_at_optimal=0.08726646
      PathPoint P1: pelvis (-0.0284893 -0.0300345 -0.0954444)
      ConditionalPathPoint P2: femur_l (0.0334917 -0.404106 -0.00190522) range=(-2.61799 -1.45997)
          coordinate=knee_angle_l
      MovingPathPoint P3: tibia_l (0.0504246 0.022192 -0.00135343) x_coordinate=knee_angle_l y_coordinate=knee_angle_l
          z_coordinate=knee_angle_l
        x_location: MultiplierFunction: scale=0.9667322
          SimmSpline: x=(-2.0944 -1.99997 -1.5708 -1.45752 -1.39626 -1.0472 -0.698132 -0.526391 -0.349066 -0.174533 0 0.00017453 0.00034907 0.0279253 0.0872665 0.174533 2.0944)
              y=(0.0155805 0.0179938 0.0275081 0.0296564 0.0307615 0.0365695 0.0422074 0.0450902 0.048391 0.0534299 0.0617576 0.0617669 0.0617762 0.0633083 0.066994 0.0733035 0.0573481)
        y_location: MultiplierFunction: scale=0.9667322
          SimmSpline: x=(-2.0944 -1.99997 -1.5708 -1.45752 -1.39626 -1.0472 -0.698132 -0.526391 -0.349066 -0.174533 0 0.00017453 0.00034907 0.0279253 0.0872665 0.174533 2.0944)
              y=(0.0234116 0.0237613 0.0251141 0.0252795 0.0253146 0.0249184 0.0242373 0.0238447 0.0234197 0.0227644 0.020984 0.0209814 0.0209788 0.0205225 0.0191754 0.0159554 -0.0673774)
        z_location: MultiplierFunction: scale=0.9667322
          SimmSpline: x=(-2.0944 0.1745) y=(-0.0014 -0.0014)
    Thelen2003Muscle vas_med_l: max_isometric_force=1294 optimal_fiber_length=0.08944402 tendon_slack_length=0.1266286
        pennation_angle_at_optimal=0.08726646
      PathPoint P1: femur_l (0.0140384 -0.210476 -0.0188516)
      PathPoint P2: femur_l (0.0356977 -0.27766 -0.000902471)
      ConditionalPathPoint P3: femur_l (0.0371016 -0.405911 0.0125343) range=(-2.61799 -1.21004)
          coordinate=knee_angle_l
      ConditionalPathPoint P4: femur_l (0.0274752 -0.426668 0.013136) range=(-2.61799 -1.78006) coordinate=knee_angle_l
      MovingPathPoint P5: tibia_l (0.0447707 0.0219473 0.0141143) x_coordinate=knee_angle_l y_coordinate=knee_angle_l
          z_coordinate=knee_angle_l
        x_location: MultiplierFunction: scale=0.9667322
          SimmSpline: x=(-2.0944 -1.99997 -1.5708 -1.45752 -1.39626 -1.0472 -0.698132 -0.526391 -0.349066 -0.174533 0 0.00017453 0.00034907 0.0279253 0.0872665 0.174533 2.0944)
              y=(0.00981097 0.0122243 0.0217371 0.0238851 0.0249902 0.0307959 0.0364187 0.0392871 0.0425654 0.0475764 0.0559586 0.0559681 0.0559776 0.0575419 0.0613368 0.0679503 0.0629332)
        y_location: MultiplierFunction: scale=0.9667322
          SimmSpline: x=(-2.0944 -1.99997 -1.5708 -1.45752 -1.39626 -1.0472 -0.698132 -0.526391 -0.349066 -0.174533 0 0.00017453 0.00034907 0.0279253 0.0872665 0.174533 2.0944)
              y=(0.0224154 0.0227651 0.0241265 0.0242933 0.0243287 0.0239462 0.0233593 0.0230677 0.0228342 0.0226362 0.0217917 0.0217903 0.0217889 0.0215365 0.0206842 0.0183269 -0.0656205)
        z_location: MultiplierFunction: scale=0.9667322
          SimmSpline: x=(-2.0944 2.0944) y=(0.0146 0.0146)
    Thelen2003Muscle vas_int_l: max_isometric_force=1365 optimal_fiber_length=0.08757628 tendon_slack_length=0.1369009
        pennation_angle_at_optimal=0.05235988
      PathPoint P1: femur_l (0.0290796 -0.192928 -0.0310851)
      PathPoint P2: femur_l (0.033592 -0.208972 -0.0285782)
      ConditionalPathPoint P3: femur_l (0.0343942 -0.404106 -0.0055151) range=(-2.61799 -1.42) coordinate=knee_angle_l
      MovingPathPoint P4: tibia_l (0.0436919 0.0251938 -0.00174012) x_coordinate=knee_angle_l y_coordinate=knee_angle_l
          z_coordinate=knee_angle_l
        x_location: MultiplierFunction: scale=0.9667322
          SimmSpline: x=(-2.0944 -1.99997 -1.5708 -1.45752 -1.39626 -1.0472 -0.698132 -0.526391 -0.349066 -0.174533 0 0.00017453 0.00034907 0.0279253 0.0872665 0.174533 2.0944)
              y=(0.0082733 0.0106866 0.0202042 0.022353 0.0234583 0.0292715 0.0349465 0.037871 0.0412569 0.0465287 0.0554632 0.0554735 0.0554837 0.0571717 0.061272 0.0684368 0.0648818)
        y_location: MultiplierFunction: scale=0.9667322
          SimmSpline: x=(-2.0944 -1.99997 -1.5708 -1.45752 -1.39626 -1.0472 -0.698132 -0.526391 -0.349066 -0.174533 0 0.00017453 0.00034907 0.0279253 0.0872665 0.174533 2.0944)
              y=(0.025599 0.0259487 0.0273124 0.0274796 0.0275151 0.0271363 0.0265737 0.0263073 0.0261187 0.0260129 0.0252923 0.0252911 0.0252898 0.0250526 0.0242191 0.0218288 -0.0685706)
        z_location: MultiplierFunction: scale=0.9667322
          SimmSpline: x=(-2.0944 2.0944) y=(-0.0018 -0.0018)
    Thelen2003Muscle vas_lat_l: max_isometric_force=1871 optimal_fiber_length=0.08436077 tendon_slack_length=0.1576743
        pennation_angle_at_optimal=0.08726646
      PathPoint P1: femur_l (0.00481318 -0.185909 -0.0349958)
      PathPoint P2: femur_l (0.0269738 -0.259811 -0.0410123)
      ConditionalPathPoint P3: femur_l (0.0361991 -0.404106 -0.0205563) range=(-2.61799 -1.21004)
          coordinate=knee_angle_l
      ConditionalPathPoint P4: femur_l (0.0253694 -0.425465 -0.0184505) range=(-2.61799 -1.92004)
          coordinate=knee_angle_l
      MovingPathPoint P5: tibia_l (0.0489541 0.0205493 -0.0159511) x_coordinate=knee_angle_l y_coordinate=knee_angle_l
          z_coordinate=knee_angle_l
        x_location: MultiplierFunction: scale=0.9667322
          SimmSpline: x=(-2.0944 -1.99997 -1.5708 -1.45752 -1.39626 -1.0472 -0.698132 -0.526391 -0.349066 -0.174533 0 0.00017453 0.00034907 0.0279253 0.0872665 0.174533 2.0944)
              y=(0.0142897 0.016703 0.0262145 0.0283623 0.0294674 0.0352709 0.0408785 0.0437291 0.0469704 0.0518742 0.0599557 0.0599647 0.0599738 0.0614577 0.0650351 0.0711867 0.0583766)
        y_location: MultiplierFunction: scale=0.9667322
          SimmSpline: x=(-2.0944 -1.99997 -1.5708 -1.45752 -1.39626 -1.0472 -0.698132 -0.526391 -0.349066 -0.174533 0 0.00017453 0.00034907 0.0279253 0.0872665 0.174533 2.0944)
              y=(0.0215318 0.0218815 0.0232362 0.0234019 0.0234371 0.0230439 0.0223842 0.0220151 0.0216359 0.0210971 0.0195864 0.0195842 0.019582 0.01919 0.018008 0.0151073 -0.0653421)
        z_location: MultiplierFunction: scale=0.9667322
          SimmSpline: x=(-2.0944 2.0944) y=(-0.0165 -0.0165)
    Thelen2003Muscle med_gas_l: max_isometric_force=1558 optimal_fiber_length=0.05795072 tendon_slack_length=0.3766797
        pennation_angle_at_optimal=0.296706
      PathPoint P1: femur_l (-0.0190522 -0.393979 0.0235645)
      ConditionalPathPoint P2: femur_l (-0.0300824 -0.403304 0.0258708) range=(-0.785398 0.174533)
          coordinate=knee_angle_l
      PathPoint P3: calcn_l (0 0.0283317 0.0048438)
    Thelen2003Muscle lat_gas_l: max_isometric_force=683 optimal_fiber_length=0.06179782 tendon_slack_length=0.3669246
        pennation_angle_at_optimal=0.1396263
      PathPoint P1: femur_l (-0.0220604 -0.395683 -0.0272747)
      ConditionalPathPoint P2: femur_l (-0.0300824 -0.402903 -0.0274752) range=(-0.785398 0.174533)
          coordinate=knee_angle_l
      PathPoint P3: calcn_l (0 0.0283317 0.0048438)
    Thelen2003Muscle soleus_l: max_isometric_force=3549 optimal_fiber_length=0.04817055 tendon_slack_length=0.2408528
        pennation_angle_at_optimal=0.4363323
      PathPoint P1: tibia_l (-0.00232016 -0.1482 -0.0068638)
      PathPoint P2: calcn_l (0 0.0283317 0.0048438)
    Thelen2003Muscle tib_post_l: max_isometric_force=1588 optimal_fiber_length=0.02975706 tendon_slack_length=0.2975706
        pennation_angle_at_optimal=0.2094395
      PathPoint P1: tibia_l (-0.00908728 -0.130315 -0.00183679)
      PathPoint P2: tibia_l (-0.0139209 -0.391623 0.0221382)
      PathPoint P3: calcn_l (0.0381106 0.0305251 0.0261382)
      PathPoint P4: calcn_l (0.070555 0.0145314 0.0256813)
    Thelen2003Muscle flex_dig_l: max_isometric_force=310 optimal_fiber_length=0.03202528 tendon_slack_length=0.376768
        pennation_angle_at_optimal=0.1221731
      PathPoint P1: tibia_l (-0.00802388 -0.197793 0.00174012)
      PathPoint P2: tibia_l (-0.0148877 -0.391623 0.018948)
      PathPoint P3: calcn_l (0.0398471 0.0287886 0.0255899)
      PathPoint P4: calcn_l (0.0647058 0.0160851 0.0240362)
      PathPoint P5: calcn_l (0.151529 -0.00740279 -0.0106015)
      PathPoint P6: toes_l (-0.00173646 -0.00712861 -0.0134347)
      PathPoint P7: toes_l (0.0260468 -0.00648886 -0.0196494)
      PathPoint P8: toes_l (0.0403041 -0.00548355 -0.022117)
    Thelen2003Muscle flex_hal_l: max_isometric_force=322 optimal_fiber_length=0.040412 tendon_slack_length=0.3571293
        pennation_angle_at_optimal=0.1745329
      PathPoint P1: tibia_l (-0.00763718 -0.225635 -0.0235883)
      PathPoint P2: tibia_l (-0.0179812 -0.39433 0.0168211)
      PathPoint P3: calcn_l (0.0341808 0.0252243 0.0220256)
      PathPoint P4: calcn_l (0.0948654 0.00621469 0.0233965)
      PathPoint P5: calcn_l (0.157743 -0.0048438 0.0245846)
      PathPoint P6: toes_l (0.0141658 -0.00584912 0.024219)
      PathPoint P7: toes_l (0.0513626 -0.00932203 0.016542)
    Thelen2003Muscle tib_ant_l: max_isometric_force=905 optimal_fiber_length=0.09378992 tendon_slack_length=0.2134199
        pennation_angle_at_optimal=0.08726646
      PathPoint P1: tibia_l (0.0173045 -0.156997 -0.0111174)
      PathPoint P2: tibia_l (0.0318055 -0.381956 0.0171112)
      PathPoint P3: calcn_l (0.106564 0.0162679 0.0278747)
    Thelen2003Muscle per_brev_l: max_isometric_force=435 optimal_fiber_length=0.04787955 tendon_slack_length=0.1541721
        pennation_angle_at_optimal=0.08726646
      PathPoint P1: tibia_l (-0.00676713 -0.255797 -0.0314188)
      PathPoint P2: tibia_l (-0.0191413 -0.404481 -0.0273585)
      PathPoint P3: tibia_l (-0.0139209 -0.415211 -0.0279386)
      PathPoint P4: calcn_l (0.0430458 0.024676 -0.0212944)
      PathPoint P5: calcn_l (0.0618727 0.0200149 -0.0313476)
    Thelen2003Muscle per_long_l: max_isometric_force=943 optimal_fiber_length=0.04663977 tendon_slack_length=0.328382
        pennation_angle_at_optimal=0.1745329
      PathPoint P1: tibia_l (0.000483366 -0.151584 -0.0349957)
      PathPoint P2: tibia_l (-0.0200114 -0.406511 -0.0276485)
      PathPoint P3: tibia_l (-0.0156611 -0.417532 -0.0279386)
      PathPoint P4: calcn_l (0.0400299 0.0210203 -0.0201977)
      PathPoint P5: calcn_l (0.0622383 0.0096876 -0.0259555)
      PathPoint P6: calcn_l (0.0778664 0.00630608 -0.0107843)
      PathPoint P7: calcn_l (0.109945 0.00776836 0.0168162)
    Thelen2003Muscle per_tert_l: max_isometric_force=180 optimal_fiber_length=0.07537183 tendon_slack_length=0.09540737
        pennation_angle_at_optimal=0.2268928
      PathPoint P1: tibia_l (0.000966732 -0.271072 -0.0223315)
      PathPoint P2: tibia_l (0.0221382 -0.393363 -0.015371)
      PathPoint P3: calcn_l (0.0783233 0.0208375 -0.0273263)
    Thelen2003Muscle ext_dig_l: max_isometric_force=512 optimal_fiber_length=0.09664302 tendon_slack_length=0.3268808
        pennation_angle_at_optimal=0.1396263
      PathPoint P1: tibia_l (0.00309354 -0.133506 -0.0266818)
      PathPoint P2: tibia_l (0.0279386 -0.38737 -0.00696047)
      PathPoint P3: calcn_l (0.0842638 0.0354603 9.13924e-5)
      PathPoint P4: calcn_l (0.14769 0.00502658 -0.011881)
      PathPoint P5: toes_l (0.000274177 0.00429544 -0.013983)
      PathPoint P6: toes_l (0.0404868 -0.00036557 -0.0228481)
    Thelen2003Muscle ext_hal_l: max_isometric_force=162 optimal_fiber_length=0.1049025 tendon_slack_length=0.2882456
        pennation_angle_at_optimal=0.1047198
      PathPoint P1: tibia_l (0.00116008 -0.170822 -0.0220415)
      PathPoint P2: tibia_l (0.0315155 -0.385243 0.00821722)
      PathPoint P3: calcn_l (0.0886507 0.0355517 0.0192838)
      PathPoint P4: calcn_l (0.11817 0.0282403 0.0234879)
      PathPoint P5: calcn_l (0.158474 0.0127035 0.0255899)
      PathPoint P6: toes_l (0.0272349 0.00374709 0.0223911)
      PathPoint P7: toes_l (0.0514539 0.00310734 0.016999)
    Thelen2003Muscle ercspn_r: max_isometric_force=2500 optimal_fiber_length=0.1152032 tendon_slack_length=0.02880079
        pennation_angle_at_optimal=0
      PathPoint P1: pelvis (-0.135204 0.042396 0.0429894)
      PathPoint P2: torso (-0.0490605 0.105361 0.0214974)
    Thelen2003Muscle ercspn_l: max_isometric_force=2500 optimal_fiber_length=0.1152032 tendon_slack_length=0.02880079
        pennation_angle_at_optimal=0
      PathPoint P1: pelvis (-0.135204 0.042396 -0.0429894)
      PathPoint P2: torso (-0.0490605 0.105361 -0.0214974)
    Thelen2003Muscle intobl_r: max_isometric_force=900 optimal_fiber_length=0.09683367 tendon_slack_length=0.09683367
        pennation_angle_at_optimal=0
      PathPoint P1: pelvis (-0.0386296 0.0676018 0.11408)
      PathPoint P2: torso (0.0624406 0.153253 0.0133801)
    Thelen2003Muscle intobl_l: max_isometric_force=900 optimal_fiber_length=0.09683367 tendon_slack_length=0.09683367
        pennation_angle_at_optimal=0
      PathPoint P1: pelvis (-0.0386296 0.0676018 -0.11408)
      PathPoint P2: torso (0.0624406 0.153253 -0.0133801)
    Thelen2003Muscle extobl_r: max_isometric_force=900 optimal_fiber_length=0.1143157 tendon_slack_length=0.1333683
        pennation_angle_at_optimal=0
      PathPoint P1: pelvis (-0.0289722 -0.061421 0.00985996)
      PathPoint P2: torso (0.0579806 0.105361 0.098121)
    Thelen2003Muscle extobl_l: max_isometric_force=900 optimal_fiber_length=0.1143157 tendon_slack_length=0.1333683
        pennation_angle_at_optimal=0
      PathPoint P1: pelvis (-0.0289722 -0.061421 -0.00985996)
      PathPoint P2: torso (0.0579806 0.105361 -0.098121)
    HuntCrossleyForce grf_r1: transition_velocity=0.1
      ContactParametersSet contact_parameters:
        ContactParameters: geometry=(plate s1_r) stiffness=1000000 dissipation=2 static_friction=0.8
            dynamic_friction=0.8 viscous_friction=0.5
    HuntCrossleyForce grf_r2: transition_velocity=0.1
      ContactParametersSet contact_parameters:
        ContactParameters: geometry=(plate s2_r) stiffness=1000000 dissipation=2 static_friction=0.8
            dynamic_friction=0.8 viscous_friction=0.5
    HuntCrossleyForce grf_r3: transition_velocity=0.1
      ContactParametersSet contact_parameters:
        ContactParameters: geometry=(plate s3_r) stiffness=1000000 dissipation=2 static_friction=0.8
            dynamic_friction=0.8 viscous_friction=0.5
    HuntCrossleyForce grf_r4: transition_velocity=0.1
      ContactParametersSet contact_parameters:
        ContactParameters: geometry=(plate s4_r) stiffness=1000000 dissipation=2 static_friction=0.8
            dynamic_friction=0.8 viscous_friction=0.5
    HuntCrossleyForce grf_r5: transition_velocity=0.1
      ContactParametersSet contact_parameters:
        ContactParameters: geometry=(plate s5_r) stiffness=1000000 dissipation=2 static_friction=0.8
            dynamic_friction=0.8 viscous_friction=0.5
    HuntCrossleyForce grf_r6: transition_velocity=0.1
      ContactParametersSet contact_parameters:
        ContactParameters: geometry=(plate s6_r) stiffness=1000000 dissipation=2 static_friction=0.8
            dynamic_friction=0.8 viscous_friction=0.5
    HuntCrossleyForce grf_l1: transition_velocity=0.1
      ContactParametersSet contact_parameters:
        ContactParameters: geometry=(plate s1_l) stiffness=1000000 dissipation=2 static_friction=0.8
            dynamic_friction=0.8 viscous_friction=0.5
    HuntCrossleyForce grf_l2: transition_velocity=0.1
      ContactParametersSet contact_parameters:
        ContactParameters: geometry=(plate s2_l) stiffness=1000000 dissipation=2 static_friction=0.8
            dynamic_friction=0.8 viscous_friction=0.5
    HuntCrossleyForce grf_l3: transition_velocity=0.1
      ContactParametersSet contact_parameters:
        ContactParameters: geometry=(plate s3_l) stiffness=1000000 dissipation=2 static_friction=0.8
            dynamic_friction=0.8 viscous_friction=0.5
    HuntCrossleyForce grf_l4: transition_velocity=0.1
      ContactParametersSet contact_parameters:
        ContactParameters: geometry=(plate s4_l) stiffness=1000000 dissipation=2 static_friction=0.8
            dynamic_friction=0.8 viscous_friction=0.5
    HuntCrossleyForce grf_l5: transition_velocity=0.1
      ContactParametersSet contact_parameters:
        ContactParameters: geometry=(plate s5_l) stiffness=1000000 dissipation=2 static_friction=0.8
            dynamic_friction=0.8 viscous_friction=0.5
    HuntCrossleyForce grf_l6: transition_velocity=0.1
      ContactParametersSet contact_parameters:
        ContactParameters: geometry=(plate s6_l) stiffness=1000000 dissipation=2 static_friction=0.8
            dynamic_friction=0.8 viscous_friction=0.5
    ObjectGroup R_hip_abd: members=(glut_max1_r glut_med1_r glut_med2_r glut_med3_r glut_min1_r glut_min2_r glut_min3_r peri_r sar_r tfl_r)
    ObjectGroup R_hip_flex: members=(add_brev_r add_long_r glut_med1_r glut_min1_r grac_r iliacus_r pect_r psoas_r rect_fem_r sar_r tfl_r)
    ObjectGroup R_hip_inrot: members=(glut_med1_r glut_min1_r iliacus_r psoas_r tfl_r)
    ObjectGroup R_hip_exrot: members=(gem_r glut_med3_r glut_min3_r peri_r quad_fem_r)
    ObjectGroup R_hip_ext: members=(add_long_r add_mag1_r add_mag2_r add_mag3_r bifemlh_r glut_max1_r glut_max2_r glut_max3_r glut_med3_r glut_min3_r semimem_r semiten_r)
    ObjectGroup R_hip_add: members=(add_brev_r add_long_r add_mag1_r add_mag2_r add_mag3_r bifemlh_r grac_r pect_r semimem_r semiten_r)
    ObjectGroup R_knee_bend: members=(bifemlh_r bifemsh_r grac_r lat_gas_r med_gas_r sar_r semimem_r semiten_r)
    ObjectGroup R_knee_ext: members=(rect_fem_r vas_int_r vas_lat_r vas_med_r)
    ObjectGroup R_ankle_pf: members=(flex_dig_r flex_hal_r lat_gas_r med_gas_r per_brev_r per_long_r soleus_r tib_post_r)
    ObjectGroup R_inverter: members=(ext_hal_r flex_dig_r flex_hal_r tib_ant_r tib_post_r)
    ObjectGroup R_ankle_df: members=(ext_dig_r ext_hal_r per_tert_r tib_ant_r)
    ObjectGroup R_everter: members=(ext_dig_r per_brev_r per_long_r per_tert_r)
    ObjectGroup L_hip_abd: members=(glut_max1_l glut_med1_l glut_med2_l glut_med3_l glut_min1_l glut_min2_l glut_min3_l peri_l sar_l tfl_l)
    ObjectGroup L_hip_flex: members=(add_brev_l add_long_l glut_med1_l glut_min1_l grac_l iliacus_l pect_l psoas_l rect_fem_l sar_l tfl_l)
    ObjectGroup L_hip_inrot: members=(glut_med1_l glut_min1_l iliacus_l psoas_l tfl_l)
    ObjectGroup L_hip_exrot: members=(gem_l glut_med3_l glut_min3_l peri_l quad_fem_l)
    ObjectGroup L_hip_ext: members=(add_long_l add_mag1_l add_mag2_l add_mag3_l bifemlh_l glut_max1_l glut_max2_l glut_max3_l glut_med3_l glut_min3_l semimem_l semiten_l)
    ObjectGroup L_hip_add: members=(add_brev_l add_long_l add_mag1_l add_mag2_l add_mag3_l bifemlh_l grac_l pect_l semimem_l semiten_l)
    ObjectGroup L_knee_bend: members=(bifemlh_l bifemsh_l grac_l lat_gas_l med_gas_l sar_l semimem_l semiten_l)
    ObjectGroup L_knee_ext: members=(rect_fem_l vas_int_l vas_lat_l vas_med_l)
    ObjectGroup L_ankle_pf: members=(flex_dig_l flex_hal_l lat_gas_l med_gas_l per_brev_l per_long_l soleus_l tib_post_l)
    ObjectGroup L_inverter: members=(ext_hal_l flex_dig_l flex_hal_l tib_ant_l tib_post_l)
    ObjectGroup L_ankle_df: members=(ext_dig_l ext_hal_l per_tert_l tib_ant_l)
    ObjectGroup L_everter: members=(ext_dig_l per_brev_l per_long_l per_tert_l)
    ObjectGroup back_ext: members=(ercspn_l ercspn_r)
    ObjectGroup back_rlb: members=(ercspn_r extobl_r intobl_r)
    ObjectGroup back_introt: members=(ercspn_r extobl_l intobl_r)
    ObjectGroup back_llb: members=(ercspn_l extobl_l intobl_l)
    ObjectGroup back_extrot: members=(ercspn_l extobl_r intobl_l)
    ObjectGroup back_flex: members=(extobl_l extobl_r intobl_l intobl_r)
  ContactGeometrySet:
    ContactHalfSpace plate: body_name=ground location=(0 0 0) orientation=(0 0 -1.5708)
      # Body name to connect the contact geometry to
      # Location of geometry center in the body frame
      # Orientation of geometry in the body frame
      # Display Pref. 0:Hide 1:Wire 3:Flat 4:Shaded
    ContactSphere s1_r: body_name=calcn_r location=(0.001901158 -0.021859 -0.003826304) radius=0.032
      # Body name to connect the contact geometry to
      # Location of geometry center in the body frame
    ContactSphere s2_r: body_name=calcn_r location=(0.1483864 -0.021859 -0.02871342) radius=0.032
      # Body name to connect the contact geometry to
      # Location of geometry center in the body frame
    ContactSphere s3_r: body_name=calcn_r location=(0.1330012 -0.021859 0.05163625) radius=0.032
      # Body name to connect the contact geometry to
      # Location of geometry center in the body frame
    ContactSphere s4_r: body_name=toes_r location=(0.06 -0.0214476 -0.01876031) radius=0.032
      # Body name to connect the contact geometry to
      # Location of geometry center in the body frame
    ContactSphere s5_r: body_name=calcn_r location=(0.06623467 -0.021859 0.02636416) radius=0.032
      # Body name to connect the contact geometry to
      # Location of geometry center in the body frame
    ContactSphere s6_r: body_name=toes_r location=(0.045 -0.0214476 0.06185696) radius=0.032
      # Body name to connect the contact geometry to
      # Location of geometry center in the body frame
    ContactSphere s1_l: body_name=calcn_l location=(0.001901158 -0.021859 0.003826304) radius=0.032
      # Body name to connect the contact geometry to
      # Location of geometry center in the body frame
    ContactSphere s2_l: body_name=calcn_l location=(0.1483864 -0.021859 0.02871342) radius=0.032
      # Body name to connect the contact geometry to
      # Location of geometry center in the body frame
    ContactSphere s3_l: body_name=calcn_l location=(0.1330012 -0.021859 -0.05163625) radius=0.032
      # Body name to connect the contact geometry to
      # Location of geometry center in the body frame
    ContactSphere s4_l: body_name=toes_l location=(0.06 -0.0214476 0.01876031) radius=0.032
      # Body name to connect the contact geometry to
      # Location of geometry center in the body frame
    ContactSphere s5_l: body_name=calcn_l location=(0.06623467 -0.021859 -0.02636416) radius=0.032
      # Body name to connect the contact geometry to
      # Location of geometry center in the body frame
    ContactSphere s6_l: body_name=toes_l location=(0.045 -0.0214476 -0.06185696) radius=0.032
      # Body name to connect the contact geometry to
      # Location of geometry center in the body frame
